<?xml version="1.0"?>
<!-- Generated by Aero-Matic v 0.8

     Inputs:
                horsepower: 1200.0
                     pitch: variable
            max engine rpm: 2700
        prop diameter (ft): 10.166666666667

     Outputs:
              max prop rpm:1845.54
                gear ratio:   1.46
                       Cp0:0.087806
                       Ct0:0.075513
       static thrust (lbs):1815.06
-->

<propeller name="prop">
  <ixx>16.3176 </ixx>
  <diameter unit="IN">122.0 </diameter>
  <numblades> 4 </numblades>
  <gearratio>1.46 </gearratio>
  <minpitch> 12 </minpitch>
  <maxpitch> 30 </maxpitch>
  <minrpm>   1569 </minrpm>
  <maxrpm>   1846 </maxrpm>

  <table name="C_THRUST" type="internal">
      <tableData>
                12         30
       0.0      0.0755   0.1155
       0.1      0.0692   0.1155
       0.2      0.0629   0.1155
       0.3      0.0523   0.1149
       0.4      0.0397   0.1144
       0.5      0.0271   0.1129
       0.6      0.0116   0.1068
       0.7      -0.0010   0.0961
       0.8      -0.0223   0.0852
       1.0      -0.0484   0.0567
       1.2      -0.0793   0.0303
       1.4      -0.1084   0.0022
       1.6      -0.1420   -0.0248
       1.8      -0.1737   -0.0517
       2.0      -0.2039   -0.0799
       2.2      -0.2341   -0.1086
       2.4      -0.2643   -0.1375
      </tableData>
  </table>

  <table name="C_POWER" type="internal">
     <tableData>
                12         30
       0.0      0.0878   0.1478
       0.1      0.0878   0.1478
       0.2      0.0837   0.1478
       0.3      0.0796   0.1478
       0.4      0.0700   0.1478
       0.5      0.0576   0.1462
       0.6      0.0466   0.1446
       0.7      0.0275   0.1413
       0.8      0.0110   0.1347
       1.0      -0.0329   0.1100
       1.2      -0.0960   0.0739
       1.4      -0.1782   0.0370
       1.6      -0.2634   -0.0033
       1.8      -0.3512   -0.0902
       2.0      -0.4390   -0.1803
       2.2      -0.5268   -0.2705
       2.4      -0.6146   -0.3606
     </tableData>
  </table>

</propeller>
