<?xml version="1.0"?>
<!--
    -->

<propeller name="Prop">
    <ixx> 12.2332 </ixx>
    <diameter unit="IN">122 </diameter>
    <numblades> 3 </numblades>
    <gearratio> 1.46</gearratio>
    <minpitch>12</minpitch>
    <maxpitch>30</maxpitch>
    <minrpm>1476</minrpm>
    <maxrpm>1846</maxrpm>
    <table name="C_THRUST" type="internal">
        <tableData>
            000012    000015    000020    000025    000030
            0.0    0.0755    0.0785    0.0865    0.0945    0.1025
            0.1    0.0692    0.0730    0.0840    0.0945    0.1025
            0.2    0.0629    0.0663    0.0791    0.0945    0.1025
            0.3    0.0523    0.0581    0.0732    0.0945    0.1025
            0.4    0.0397    0.0487    0.0643    0.0882    0.1025
            0.5    0.0271    0.0387    0.0559    0.0809    0.1025
            0.6    0.0116    0.0276    0.0470    0.0725    0.0986
            0.7    -0.0010    0.0149    0.0371    0.0630    0.0908
            0.8    -0.0223    0.0028    0.0267    0.0546    0.0836
            1.0    -0.0484    -0.0166    0.0049    0.0331    0.0624
            1.2    -0.0793    -0.0359    -0.0099    0.0121    0.0412
            1.4    -0.1084    -0.0553    -0.0247    -0.0105    0.0178
            1.6    -0.1420    -0.0746    -0.0395    -0.0315    -0.0056
            1.8    -0.1737    -0.0940    -0.0544    -0.0525    -0.0279
            2.0    -0.2039    -0.1133    -0.0692    -0.0735    -0.0501
        </tableData>
    </table>

    <table name="C_POWER" type="internal">
        <tableData>
            000012    000015    000020    000025    000030
            0.0    0.0627    0.0666    0.0751    0.0958    0.0998
            0.1    0.0627    0.0666    0.0751    0.0936    0.0998
            0.2    0.0615    0.0655    0.0751    0.0921    0.0939
            0.3    0.0602    0.0644    0.0751    0.0899    0.0939
            0.4    0.0527    0.0577    0.0734    0.0892    0.0939
            0.5    0.0439    0.0500    0.0684    0.0892    0.0969
            0.6    0.0376    0.0444    0.0626    0.0884    0.0969
            0.7    0.0226    0.0311    0.0568    0.0833    0.0969
            0.8    0.0188    0.0167    0.0434    0.0759    0.0939
            1.0    -0.0125    -0.0111    0.0184    0.0553    0.0822
            1.2    -0.0439    -0.0389    -0.0058    0.0258    0.0616
            1.4    -0.0753    -0.0666    -0.0300    -0.0037    0.0352
            1.6    -0.1066    -0.0944    -0.0542    -0.0332    0.0029
            1.8    -0.1380    -0.1221    -0.0793    -0.0700    -0.0352
            2.0    -0.1693    -0.1499    -0.1043    -0.0995    -0.0705
        </tableData>
    </table>
</propeller>
